# Лабораторная работа №1 студента 1 курса 7 группы Бобровича Глеба
(4*sqrt(5 - 2*sqrt(6)))/((nthroot(3, 4) + nthroot(2, 4))*(nthroot(2, 4) - nthroot(3, 4))) = -4
y1 := (sqrt(3^3 + 3) + cos(|3*3 - 1|))/nthroot(3^5 + 8*3 + 3, 4) = 1.31531
t := (sum(sin(i/3), i = 1 .. 10) + sum((i - 3)/(i + 3), i = 1 .. 5))/product((3 + 3i)/(3^2 + 3i - 3), i = 1 .. 5) = -2.05779 - 54.1885i
x := -2, -1.8 .. 2
y(x) := 4*sin(2*x)/cos(3*x)^2 + sqrt(3*x^2)
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A := [1, 2, 3; 3, 2, 1; 2, 1, 3]
B := [4, 5, 6; 6, 4, 5; 5, 4, 6]
V := [1; 2; 3]
S := B*V = [32; 29; 31]
d := |A|*|B| = 180
C := A*B = [31, 25, 34; 29, 27, 34; 29, 26, 35]
g := transpose(V)*A*V = 73
q := max(A) = 3
p := min(B) = 4
E := A^-1*C - B = [-1.77636e-15, -1.77636e-15, -1.77636e-15; 0, 0, 0; -8.88178e-16, 0, 0]
a := π/6
b := π
integral(cos(x)^2*t^3 + sqrt(10*t^2), t = a .. b) = [19.3858; 16.4279; 15.1925; 15.8747; 18.3668; 22.2753; 26.9832; 31.7472; 35.8151; 38.5448; 39.5052; 38.5448; 35.8151; 31.7472; 26.9832; 22.2753; 18.3668; 15.8747; 15.1925; 16.4279; 19.3858]
y := -6, -5.8 .. 6
n := 60
x := -6, -5.8 .. 6
f(x, y) := e^(sin(x) + sin(y))
f(x, y) =  # no stored result
# [component: inputs f]
