# Лабораторная работа №2
f(x) := 2*x + sin(x) - 1
x := -3 .. 3
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x := 0
root(f(x), x) = 0.335418
x := -3 .. 3
f(x) := e^(x + 1) + x^2 - 4
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x := -2
root(f(x), x) = -1.89511
g(x) := 0
g(x) := x^4 - 14*x^2 - 40*x - 75
v := [-75; -40; -14; 1]
y := polyroots(v)
y = [-1.33475 - 1.64854i; -1.33475 + 1.64854i; 16.6695]
A := [9, 10, -7, -1; 7, 0, -1, -5; 5, 0, -2, 1; 4, 1, 2, 3]
B := [23; 37; 22; 26]
x1 := 1
x2 := 1
x3 := 1
x4 := 1
Given
9*x1 + 10*x2 - 7*x3 - x4 == 23
7*x1 - x3 - 5*x4 == 37
5*x1 - 2*x3 + x4 == 22
4*x1 + x2 + 2*x3 + 3*x4 == 26
r := Find(x1, x2, x3, x4)
lsolve(A, B) = [5.51752; -0.80593; 2.68733; -0.212938]
r = [5.51752; -0.80593; 2.68733; -0.212938]
x := 1
y := 1
Given
cos(x + y) == 1
2*x - sin(y - 0.5) == 1
V := Minerr(x, y)
V = [0.184037; -0.184037]
