limit((y^3 + 3*y^2 + 2*y)/(y^2 - y - 6), y → -2) → -2/5
d/dx(4*sin(2*x)/cos(3*x)^2) + sqrt(3*x^2) → 8*cos(2*x)/cos(3*x)^2 + sqrt(3)*sqrt(x^2) + 24*sin(2*x)*sin(3*x)/cos(3*x)^3
integral(1/sqrt(9 - 25*x^2), x) → asin(5*x/3)/5
x := -3 .. 3
x := -3 .. 3
2*x + sin(x) - 1 → [-sin(3) - 7; -sin(2) - 5; -sin(1) - 3; -1; sin(1) + 1; sin(2) + 3; sin(3) + 5]
e^(x + 1) + x^2 - 4 → [e^-2 + 5; e^-1; -2; e - 4; e^2 - 3; e^3; e^4 + 5]
x^4 - 14^2 - 40*x - 75 → [-70; -175; -230; -271; -310; -335; -310]
x := -5 .. 5
f1(x) := sqrt(3)
f2(x) := e^x
f3(x) := ln(x)
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k := 6
b := -1.74
i := 0, 0.5 .. 3
F(i) := if(i < 1.5, cos(i + b), i + k^2)
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