# Лабораторная работа №4
z(m) :=
    z ← sqrt((3*m + 2)^2 - 24*m)/(3*sqrt(m) - 2/sqrt(m))
    return z
z(1) = 1
x := 1 .. 10
z(x) = [1; 1.41421; 1.73205; 2; 2.23607; 2.44949; 2.64575; 2.82843; 3; 3.16228]
y(x) :=
    a ← 1.5
    return π*x^2 - 7/x^2 if x < 1.3
    return a*x^3 + 7*sqrt(x) if x == 1.3
    return log(10)*x + 7*sqrt(x) if x > 1.3
x := 0.8, 0.95 .. 2
y(x) = [-8.92688; -4.92095; -1.9838; 0.428739; 9.68251; 10.2649; 10.8269; 11.371; 11.8995]
F :=
    k ← 6
    b ← -1.74
    for i ∈ 0, 0.5 .. 3
        A[j] ← cos(i + b) if i < 1.5
        (A[j] ← i + k^2) otherwise
        j ← j + 1
    return A
F = [-0.168397; 0.324796; 0.738469; 37.5; 38; 38.5; 39]
